# Parametro de forma
# DEFEITO
# FALHA
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β := 3.5
β_h := 2.5
# Parametro de escala
δ := 20
δ_h := 25
# Tempos de chegada
u := 4
h := 15
# Intervalo constante entre inspeções
T_insp := 7
# Quantas inspeções fazer
Q_insp := 9.988
# DISTANCIA DESDE QUE ACONTECE A FALHA ATE A SUBSTITUIÇÃO PREVENTIVA
d := Q_insp*T_insp - u → 65.916  # x = u
# Δ =T
# CUSTOS | K = y
C_insp := 100
C_falha := 1200
C_prev := 350
TEMPOS
T_insp := 0.4
T_falha := 7
T_prev := 0.6
# PARAMETROS MULTICRITERIO
A_1 := 0.03
A_2 := 0.01
K_1 := 0.55
K_2 := 0.45
# DISTRIBUÇÃO DE PROBABILIDADE WEIBULL
g(u) := β/δ*(u/δ)^(β - 1)*e^(-(u/δ)^β)  # chegada do defeito
g(u) = 0.00311932
f(h) := β_h/δ_h*(h/δ_h)^(β_h - 1)*e^(-(h/δ_h)^β_h)  # Chegada da falha
f(h) = 0.0351659
# FUNÇÃO CUMULADA DA DISTRIBUÇÃO WEIBULL
falha
F(d) := 1 - e^(-(d/δ_h)^β_h)
F(d) = 0.999987
# PROBABILIDADE DE FALHA DE RENOVAÇÃO ENTRE DUAS INSPEÇÕES
P_b := integral(g(u)*F(t[i] - u), u = t[i - 1] .. t[i])  # error: bad_variable mc_t mc_t value_zone
# PROBABILIDADE DE UMA INSPEÇÃO DE RENOVAÇÃO ENTRE DUAS INSPEÇÕES
P_m(t) := integral(g(u)*(1 - F(t[i] - u)), u = t[i - 1, 0] .. t[i, 0])  # error: bad_variable mc_i mc_i value_zone
t := 2, 4 .. 20000
# [component: outputs t]
N := 1, 2 .. 50
C(N) := sum(((i - 1)*C_insp + C_falha)*integral(g(u)*F(t[i] - u), u = t[i - 1, 0] .. t[i, 0]) + (i*C_insp + C_prev)*integral(g(u)*(1 - F(t[i] - u)), u = t[i - 1, 0] .. t[i, 0]), i = 1 .. N)/sum(integral(integral((u + h)*g(u)*f(h), u = 0 .. t[i, 0] - u), h = t[i - 1, 0] .. t[i, 0]) + t[i, 0]*integral(g(u)*(1 - F(t[i] - u)), u = t[i - 1, 0] .. t[i, 0]), i = 1 .. N)
C(N) = [
    112.591; 95.1114; 84.9398; 78.0032; 72.6111; 67.9775; 63.712; 59.621; 55.6212; 51.699
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]
D(N) := sum(((i - 1)*T_insp + T_falha)*integral(g(u)*F(t[i] - u), u = t[i - 1, 0] .. t[i, 0]) + (i*T_insp + T_prev)*integral(g(u)*(1 - F(t[i] - u)), u = t[i - 1, 0] .. t[i, 0]), i = 1 .. N)/sum(integral(integral((u + h)*g(u)*f(h), u = 0 .. t[i, 0] - u), h = t[i - 1, 0] .. t[i, 0]) + t[i, 0]*integral(g(u)*(1 - F(t[i] - u)), u = t[i - 1, 0] .. t[i, 0]), i = 1 .. N)
D(N) = [
    0.250528; 0.236427; 0.227708; 0.220755; 0.213984; 0.206654; 0.198447; 0.189284; 0.179244; 0.168532
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]
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# MAUT MULTICRITERIO
N := 1, 2 .. 50
U_D(N) := e^(-A_1*D(N))
U_C(N) := e^(-A_2*C(N))
U_D(N) = [
    0.992512; 0.992932; 0.993192; 0.993399; 0.993601; 0.99382; 0.994064; 0.994338; 0.994637; 0.994957
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]
U_C(N) = [
    0.324359; 0.386311; 0.427672; 0.458391; 0.483787; 0.506731; 0.528813; 0.550895; 0.573377; 0.596313
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]
U_CD(N) := K_1*e^(-A_1*D(N)) + K_2*e^(-A_2*C(N))
U_CD(N) = [
    0.691843; 0.719953; 0.738708; 0.752646; 0.764185; 0.77463; 0.784701; 0.794789; 0.80507; 0.815567
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]
